N := 100
ORIGIN := 1
n := 5
i := 1 .. n
j := 1 .. n
B := [
    9.138760879, 1.315879912, 0.269748534, 5.673168485, 1.230424637;
    3.569634742, 0.117680023, 0.073077785, 0.394477623, 2.208013892;
    0.561353473, 0.598952312, 0.03649718, 3.434912413, 1.095613459;
    0.363471299, 0.710269784, 0.169737542, 6.708745624, 0.314460182;
    1.002211245, 0.589498911, 2.521224824, 0.519286484, 0.885165806
]
D := [
    70.40633398, 47.21298918, 31.12596121, 44.10731272, 24.70825087;
    47.21298918, 50.87568895, 11.51497768, 40.07421968, 14.37498981;
    31.12596121, 11.51497768, 22.95327555, 18.95653266, 17.85400329;
    44.10731272, 40.07421968, 18.95653266, 51.45396976, 14.15936023;
    24.70825087, 14.37498981, 17.85400329, 14.15936023, 18.89577365
]
x[:, i] := rnorm(N, 0, 1)
y := x*transpose(B)
Dex[i, j] := cvar(x[:, i], x[:, j])
Dy := B*Dex*transpose(B)
Dey[i, j] := cvar(y[:, i], y[:, j])
Dey = [
    102.387, 31.0753, 20.6106, 34.9387, 14.4537;
    31.0753, 16.0823, 3.84677, 1.49804, 6.23446;
    20.6106, 3.84677, 11.2716, 20.2465, 3.97967;
    34.9387, 1.49804, 20.2465, 40.3798, 5.34523;
    14.4537, 6.23446, 3.97967, 5.34523, 8.08161
]
Dex = [
    0.954842, -0.197006, 0.090712, -0.0147245, -0.098819;
    -0.197006, 0.985346, -0.163687, -0.00196969, 0.0606491;
    0.090712, -0.163687, 0.869821, 0.1252, 0.0660682;
    -0.0147245, -0.00196969, 0.1252, 0.892259, -0.146438;
    -0.098819, 0.0606491, 0.0660682, -0.146438, 1.16376
]
