N := 5
ORIGIN := 1
n := 5
i := 1 .. n
j := 1 .. n
k := 1 .. n
B := [
    9.138760879, 1.315879912, 0.269748534, 5.673168485, 1.230424637;
    3.569634742, 0.117680023, 0.073077785, 0.394477623, 2.208013892;
    0.561353473, 0.598952312, 0.03649718, 3.434912413, 1.095613459;
    0.363471299, 0.710269784, 0.169737542, 6.708745624, 0.314460182;
    1.002211245, 0.589498911, 2.521224824, 0.519286484, 0.885165806
]
D := [
    70.40633398, 47.21298918, 31.12596121, 44.10731272, 24.70825087;
    47.21298918, 50.87568895, 11.51497768, 40.07421968, 14.37498981;
    31.12596121, 11.51497768, 22.95327555, 18.95653266, 17.85400329;
    44.10731272, 40.07421968, 18.95653266, 51.45396976, 14.15936023;
    24.70825087, 14.37498981, 17.85400329, 14.15936023, 18.89577365
]
x[:, i] := rnorm(N, 0, 1)
y := x*transpose(B)
Dex[i, j] := cvar(x[:, i], x[:, j])
Dy := B*Dex*transpose(B)
Dey[i, j] := cvar(y[:, i], y[:, j])
Dey = [
    42.9096, 12.0645, 12.843, 22.5787, 14.9757;
    12.0645, 3.72582, 3.77176, 6.42041, 4.11356;
    12.843, 3.77176, 5.36045, 8.75799, 3.78189;
    22.5787, 6.42041, 8.75799, 14.6471, 6.79608;
    14.9757, 4.11356, 3.78189, 6.79608, 5.98745
]
Dex = [
    0.209707, -0.141212, 0.338243, 0.144476, -0.0443096;
    -0.141212, 0.672435, -0.117136, 0.0260036, 0.0919168;
    0.338243, -0.117136, 0.59035, 0.199071, -0.100955;
    0.144476, 0.0260036, 0.199071, 0.275232, 0.115863;
    -0.0443096, 0.0919168, -0.100955, 0.115863, 0.205779
]
Dxx[i, j] := cvar(x[:, i], x[:, j])
Dyx[k, j] := cvar(y[:, k], y[:, j])
Mx[i] := mean(x[:, i])
My[k] := mean(y[:, k])
MX[:, n] := Mx
MY[:, n] := My
Yk := transpose(MY) + transpose((x - transpose(MX))*Dxx^-1)*transpose(Dyx)
Yk := Dey + transpose((x - Dex)*Dxx^-1)*transpose(Dyx)
Ek := Yk - y
