# Лабораторная работа 1. Задание 1
ORIGIN := 1
n := 5
N := 1000
i := 1 .. n
j := 1 .. n
B := [
    0.375048744, 4.470949491, 2.22784529, 10.18114569, 0.164272862;
    0.604374793, 0.822636528, 2.564820257, 0.723520754, 0.22617216;
    4.62789265, 0.092975806, 1.667685566, 2.169045385, 0.005649316;
    0.395358355, 0.410203429, 2.097956136, 2.374994089, 5.23777527;
    2.964627424, 0.945606181, 0.260765989, 0.867418388, 4.086317606
]
ξ[:, i] := rnorm(N, 0, 1)
η := ξ*transpose(B)
Dξexp[i, j] := cvar(ξ[:, i], ξ[:, j])
Dη := B*Dξexp*transpose(B) = [
    324.023, 91.9194, 159.289, 195.618, 169.733;
    91.9194, 26.0758, 45.1873, 55.4932, 48.1502;
    159.289, 45.1873, 78.3058, 96.1651, 83.4402;
    195.618, 55.4932, 96.1651, 118.098, 102.471;
    169.733, 48.1502, 83.4402, 102.471, 88.9113
]
Dηexp[i, j] := cvar(η[:, i], η[:, j])
Dηexp = [
    324.023, 91.9194, 159.289, 195.618, 169.733;
    91.9194, 26.0758, 45.1873, 55.4932, 48.1502;
    159.289, 45.1873, 78.3058, 96.1651, 83.4402;
    195.618, 55.4932, 96.1651, 118.098, 102.471;
    169.733, 48.1502, 83.4402, 102.471, 88.9113
]
