# Лабораторная работа 1. Задание 2
ORIGIN := 1
N := 1000
n := 5
i := 1 .. n
j := 1 .. n
B[i, j] := 1
D := [
    15.54477656, 6.928765381, 12.21379285, 14.68299023, 16.06725617;
    6.928765381, 7.521683959, 7.46764798, 7.701147589, 12.88544426;
    12.21379285, 7.46764798, 18.27792343, 14.62450894, 20.26029223;
    14.68299023, 7.701147589, 14.62450894, 22.82317085, 18.24767261;
    16.06725617, 12.88544426, 20.26029223, 18.24767261, 38.80572851
]
ξ[:, i] := rnorm(N, 0, 1)
Dξ[i, j] := cvar(ξ[:, i], ξ[:, j])
Given
B*Dξ*transpose(B) == D
B := Find(B)
B = [
    -0.241096, 1.96243, 2.68892, 1.18306, 1.64856;
    1.43746, 1.35809, 1.25613, 1.47097, -0.389436;
    1.7883, -0.230611, 2.56423, 2.01442, 2.18331;
    2.08388, 2.27226, 2.5342, -0.398823, 2.38995;
    2.74453, 2.52967, 0.814161, 4.41226, 2.87394
]
η := ξ*transpose(B)
Dη[i, j] := cvar(η[:, i], η[:, j])
Dη = [
    15.5448, 6.92877, 12.2138, 14.683, 16.0673;
    6.92877, 7.52168, 7.46765, 7.70115, 12.8854;
    12.2138, 7.46765, 18.2779, 14.6245, 20.2603;
    14.683, 7.70115, 14.6245, 22.8232, 18.2477;
    16.0673, 12.8854, 20.2603, 18.2477, 38.8057
]
D = [
    15.5448, 6.92877, 12.2138, 14.683, 16.0673;
    6.92877, 7.52168, 7.46765, 7.70115, 12.8854;
    12.2138, 7.46765, 18.2779, 14.6245, 20.2603;
    14.683, 7.70115, 14.6245, 22.8232, 18.2477;
    16.0673, 12.8854, 20.2603, 18.2477, 38.8057
]
# Оценка вектора η
Dξξ := submatrix(D, 1, 3, 1, 3)
Dηη := submatrix(D, 4, 5, 4, 5)
Dηξ := submatrix(D, 1, 3, 4, 5)
ηp := 0 + Dξξ^-1*transpose(Dηξ)*transpose(ξ)  # error: Размерности массива не совпадают.
