N := 1 .. 35
ORIGIN := 1
i := 1 .. 5
j := 1 .. 5
k := 1 .. 3
Ypp := [
    0, 0.75, 0.542;
    2, 0.75, 0.539;
    2, 0.75, 0.506;
    2, 0.75, 0.489;
    2, 0.7, 0.531;
    2, 0.7, 0.514;
    2, 0.7, 0.561;
    2, 0.7, 0.529;
    2, 0.7, 0.537;
    2, 0.7, 0.529
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]
Y := [
    1.3, 0.762, 0.587;
    1, 0.872, 0.559;
    0.5, 0.798, 0.551;
    0.6, 0.754, 0.53;
    0.6, 0.736, 0.567;
    0.5, 0.804, 0.561;
    0.9, 0.785, 0.565;
    0.9, 0.778, 0.532;
    1, 0.785, 0.628;
    1.2, 0.774, 0.59
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]
X := [
    1.2, 0.75, 0.509, 15, 6.667;
    1.3, 0.762, 0.587, 14, 6.753;
    1, 0.872, 0.559, 12, 6.868;
    0.5, 0.798, 0.551, 8, 12.5;
    0.6, 0.754, 0.53, 9, 8.148;
    0.6, 0.736, 0.567, 8, 8.642;
    0.5, 0.804, 0.561, 6, 7.812;
    0.9, 0.785, 0.565, 9, 7.85;
    0.9, 0.778, 0.532, 10, 7.869;
    1, 0.785, 0.628, 9, 7.72
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]
Dxx[i, j] := cvar(X[:, i], X[:, j])
Dxy[i, k] := cvar(X[:, i], X[:, k])
Dyy[k, k] := cvar(X[:, k], X[:, k])
MS := [
    1.28, 0.479460481;
    0.719942857, 0.0803071101;
    0.513457143, 0.0540916123;
    13.6, 3.75891098;
    8.2734, 1.8858375;
    1.29428571, 0.484429839;
    0.715657143, 0.0826249296;
    0.5122, 0.0547060595
]
MX := submatrix(MS, 1, 5, 1, 1) = [1.28; 0.719943; 0.513457; 13.6; 8.2734]
MY := submatrix(MS, 6, 8, 1, 1) = [1.29429; 0.715657; 0.5122]
MXN[:, N] := MX
MYN[:, N] := MY
Yp := transpose(MYN) + (X - transpose(MXN))*Dxx^-1*Dxy
Yep1 := Yp - Y
Yep2 := Yp - Ypp
Yep2 = [
    1.21429, -0.00428571, -0.0342571;
    -0.685714, 0.00771429, 0.0467429;
    -0.985714, 0.117714, 0.0517429;
    -1.48571, 0.0437143, 0.0607429;
    -1.38571, 0.0497143, -0.00225714;
    -1.38571, 0.0317143, 0.0517429;
    -1.48571, 0.0997143, -0.00125714;
    -1.08571, 0.0807143, 0.0347429;
    -1.08571, 0.0737143, -0.00625714;
    -0.985714, 0.0807143, 0.0977429
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]
