ORIGIN := 1
N := 500
Del := 1
t := 1 .. N
Xtest[3, N] := 0
el[:, t] := rnorm(N, 0, Del)
z[5, 10] := 5
X := [1, 2; 2, 1; 3, 0]
t := 3 .. N
a1 := 0.3
a2 := 0.5
X[:, t] := a1*X[:, t - 2] + a2*X[:, t - 1] + el[:, t]  # error: Размерности массива не совпадают.
