ORIGIN := 1
i := 1 .. 5
j := 1 .. 5
k := 1 .. 3
m := 1 .. 3
N := 1 .. 35
X := [
    35.6, 0.535, 0.458, 9.2, 0.848;
    39.4, 0.552, 0.567, 9.5, 0.848;
    42.4, 0.55, 0.531, 9.5, 0.841;
    35.4, 0.561, 0.466, 9.3, 0.85;
    37.2, 0.565, 0.466, 9.5, 0.827;
    40.7, 0.564, 0.548, 9.3, 0.852;
    41.3, 0.562, 0.517, 9.5, 0.857;
    41.2, 0.552, 0.561, 9.3, 0.847;
    37.9, 0.559, 0.516, 9, 0.872;
    39.3, 0.545, 0.527, 9.6, 0.835
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]
Ypp := [
    35, 0.535, 0.462;
    37, 0.535, 0.539;
    41, 0.535, 0.536;
    44, 0.54, 0.503;
    44, 0.54, 0.487;
    46, 0.56, 0.528;
    47, 0.55, 0.511;
    51, 0.55, 0.56;
    47, 0.545, 0.528;
    44, 0.545, 0.536
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]
Y := [
    39.4, 0.552, 0.567;
    42.4, 0.55, 0.531;
    35.4, 0.561, 0.466;
    37.2, 0.565, 0.466;
    40.7, 0.564, 0.548;
    41.3, 0.562, 0.517;
    41.2, 0.552, 0.561;
    37.9, 0.559, 0.516;
    39.3, 0.545, 0.527;
    39.9, 0.544, 0.533
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]
Dxx[i, j] := cvar(X[:, i], X[:, j])
Dxy[i, k] := cvar(X[:, i], X[:, k])
Dyy[k, k] := cvar(X[:, k], X[:, k])
MX[i] := mean(X[:, i])
MY[k] := mean(Y[:, k])
MXN[:, N] := MX
MYN[:, N] := MY
Yp := transpose(MYN) + (X - transpose(MXN))*Dxx^-1*Dxy
Yep1 := Yp - Y
Yep2 := Yp - Ypp
Yep1 = [
    -3.81143, -0.0155429, -0.108971;
    -3.01143, 0.00345714, 0.0360286;
    6.98857, -0.00954286, 0.0650286;
    -1.81143, -0.00254286, 2.85714e-5;
    -3.51143, 0.00245714, -0.0819714;
    -0.611429, 0.00345714, 0.0310286;
    0.0885714, 0.0114571, -0.0439714;
    3.28857, -0.00554286, 0.0450286;
    -1.41143, 0.0154571, -0.0109714;
    -0.611429, 0.00245714, -0.00597143
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]
Yep2 = [
    0.588571, 0.00145714, -0.00397143;
    2.38857, 0.0184571, 0.0280286;
    1.38857, 0.0164571, -0.00497143;
    -8.61143, 0.0224571, -0.0369714;
    -6.81143, 0.0264571, -0.0209714;
    -5.31143, 0.00545714, 0.0200286;
    -5.71143, 0.0134571, 0.00602857;
    -9.81143, 0.00345714, 0.00102857;
    -9.11143, 0.0154571, -0.0119714;
    -4.71143, 0.00145714, -0.00897143
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]
