ORIGIN := 1
n := 5
N := 100
i := 1 .. n
j := 1 .. n
D := [
    70.40633398, 47.21298918, 31.12596121, 44.10731272, 24.70825087;
    47.21298918, 50.87568895, 11.51497768, 40.07421968, 14.37498981;
    31.12596121, 11.51497768, 22.95327555, 18.95653266, 17.85400329;
    44.10731272, 40.07421968, 18.95653266, 51.45396976, 14.15936023;
    24.70825087, 14.37498981, 17.85400329, 14.15936023, 18.89577365
]
B[i, j] := 1
ξ[:, i] := rnorm(N, 0, 1)
Dξ[i, j] := cvar(ξ[:, i], ξ[:, j])
Given
B*D*transpose(B) == D
B := Find(B)
B*Dξ*transpose(B) == D
η := ξ*transpose(B)
Dη[i, j] := cvar(η[:, i], η[:, j])
n := 2
m := 2
# Оценка вектора η
Dξξ := submatrix(D, 1, n, 1, n) = [70.4063, 47.213; 47.213, 50.8757]
Dηη := submatrix(D, n + 1, n + m, n + 1, n + m)
Dηξ := submatrix(D, 1, n, n + 1, n + m) = [31.126, 44.1073; 11.515, 40.0742]
ηp := 0 + Dηξ*Dξξ^-1 = [-0.36875, 1.20916; -0.965472, 1.68365]
