ORIGIN := 1
i := 1 .. 5
j := 1 .. 5
k := 1 .. 3
N := 1 .. 35
X := [
    35.6, 0.535, 0.458, 9.2, 0.848;
    39.4, 0.552, 0.567, 9.5, 0.848;
    42.4, 0.55, 0.531, 9.5, 0.841;
    35.4, 0.561, 0.466, 9.3, 0.85;
    37.2, 0.565, 0.466, 9.5, 0.827;
    40.7, 0.564, 0.548, 9.3, 0.852;
    41.3, 0.562, 0.517, 9.5, 0.857;
    41.2, 0.552, 0.561, 9.3, 0.847;
    37.9, 0.559, 0.516, 9, 0.872;
    39.3, 0.545, 0.527, 9.6, 0.835
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]
Ypp := [
    35, 0.535, 0.462;
    37, 0.535, 0.539;
    41, 0.535, 0.536;
    44, 0.54, 0.503;
    44, 0.54, 0.487;
    46, 0.56, 0.528;
    47, 0.55, 0.511;
    51, 0.55, 0.56;
    47, 0.545, 0.528;
    44, 0.545, 0.536
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]
Y := [
    39.4, 0.552, 0.567;
    42.4, 0.55, 0.531;
    35.4, 0.561, 0.466;
    37.2, 0.565, 0.466;
    40.7, 0.564, 0.548;
    41.3, 0.562, 0.517;
    41.2, 0.552, 0.561;
    37.9, 0.559, 0.516;
    39.3, 0.545, 0.527;
    39.9, 0.544, 0.533
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]
F[N, 1] := 1
F[N, j + 1] := X[N, j]
b := (transpose(F)*F)^-1*transpose(F)*Y
b = [
    37.0274, -0.179249, 0.754984;
    0.497748, -0.00150698, 0.00881596;
    20.5244, 0.796225, 0.00550504;
    -2.21522, 0.107641, -0.281728;
    -3.27006, 0.0223074, -0.070071;
    2.95097, 0.103653, 0.236573
]
Yp := F*b
Yep1 := Yp - Y
Yep2 := Yp - Ypp
Yep1 = [
    -2.26886, -0.0164917, -0.0682935;
    -4.25098, 0.0117427, -0.0504289;
    4.2603, -0.00997133, 0.0494941;
    0.0263956, -0.00518925, 0.0222987;
    -3.21744, -0.00163945, -0.0632659;
    -1.54972, 0.00124629, -0.00458878;
    -1.7627, 0.0103925, -0.047408;
    1.80931, -0.00518084, -0.0040922;
    0.0648925, 0.010421, -0.00453292;
    -2.22119, 0.00889744, -0.0521625
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]
Yep2 = [
    2.13114, 0.000508324, 0.0367065;
    1.14902, 0.0267427, -0.0584289;
    -1.3397, 0.0160287, -0.0205059;
    -6.7736, 0.0198108, -0.0147013;
    -6.51744, 0.0223605, -0.00226595;
    -6.24972, 0.00324629, -0.0155888;
    -7.5627, 0.0123925, 0.00259202;
    -11.2907, 0.00381916, -0.0480922;
    -7.63511, 0.010421, -0.00553292;
    -6.32119, 0.00789744, -0.0551625
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]
Yep1 = [
    -2.26886, -0.0164917, -0.0682935;
    -4.25098, 0.0117427, -0.0504289;
    4.2603, -0.00997133, 0.0494941;
    0.0263956, -0.00518925, 0.0222987;
    -3.21744, -0.00163945, -0.0632659;
    -1.54972, 0.00124629, -0.00458878;
    -1.7627, 0.0103925, -0.047408;
    1.80931, -0.00518084, -0.0040922;
    0.0648925, 0.010421, -0.00453292;
    -2.22119, 0.00889744, -0.0521625
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]
Yep2 = [
    2.13114, 0.000508324, 0.0367065;
    1.14902, 0.0267427, -0.0584289;
    -1.3397, 0.0160287, -0.0205059;
    -6.7736, 0.0198108, -0.0147013;
    -6.51744, 0.0223605, -0.00226595;
    -6.24972, 0.00324629, -0.0155888;
    -7.5627, 0.0123925, 0.00259202;
    -11.2907, 0.00381916, -0.0480922;
    -7.63511, 0.010421, -0.00553292;
    -6.32119, 0.00789744, -0.0551625
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]
