ORIGIN := 1
Dmin := 5
Dmax := 50
ND := 20
N := 1000
bmin := 5
bmax := 50
Nb := 20
M :=
    k ← 1
    for dw ∈ Dmin, Dmin + (Dmax - Dmin)/ND .. Dmax
        for bw ∈ bmin, bmin + (bmax - bmin)/Nb .. bmax
            x ← runif(N, 0, 10)
            y ← bw*x + rnorm(N, 0, dw)
            r ← corr(x, y)
            MR[k, 1] ← dw
            MR[k, 2] ← bw
            MR[k, 3] ← r
            k ← k + 1
    MR
z := 0.1, 0.3 .. 5
z = [0.1; 0.3; 0.5; 0.7; 0.9; 1.1; 1.3; 1.5; 1.7; 1.9; 2.1; 2.3; 2.5; 2.7; 2.9; 3.1; 3.3; 3.5; 3.7; 3.9; 4.1; 4.3; 4.5; 4.7; 4.9]
M = [
    5, 5, 0.948563;
    5, 7.25, 0.973152;
    5, 9.5, 0.984899;
    5, 11.75, 0.989611;
    5, 14, 0.992541;
    5, 16.25, 0.994096;
    5, 18.5, 0.995289;
    5, 20.75, 0.996517;
    5, 23, 0.997216;
    5, 25.25, 0.99744
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]
