ORIGIN := 1
Dmin := 0.01
Dmax := 50
ND := 20
T := 1000
N := 1000
bmin := 1
bmax := 10
Nb := 20
a := 0.01
M :=
    k ← 1
    for t ∈ 1 .. T
        dw ← 100/t
        bw ← a*dw
        x ← runif(N, 0, 10)
        y ← bw*x + rnorm(N, 0, dw)
        r ← corr(x, y)
        MR[t, 1] ← dw
        MR[t, 2] ← r
    MR
t1 := 1 .. T
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M = [
    100, 0.0420865;
    50, -0.0125149;
    33.3333, 0.0164236;
    25, 0.0685331;
    20, 0.106576;
    16.6667, 0.0370167;
    14.2857, -0.035539;
    12.5, -0.0130549;
    11.1111, 0.0459344;
    10, 0.0172353
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]
