ORIGIN := 1
N := 100
b0 := 2
b1 := 3.7
Se := 5
Xmin := 0
Xmax := 12
x := runif(N, Xmin, Xmax)
e := rnorm(N, 0, Se)
y := b0 + b1*x + e
i := 1 .. N
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XY := augment(x, y)
XY = [
    0.015221, 5.03195;
    2.31988, 17.0672;
    7.02007, 30.3918;
    4.2037, 11.2124;
    9.87405, 43.4987;
    2.08955, 3.87919;
    8.52594, 33.4044;
    3.64783, 13.8753;
    1.09694, 1.23499;
    1.76776, 0.0867186
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]
МНК - оценки - параметров - регрессии - (-(-и)) - корреляции
F := regress(x, y, 1)
a_mnk := F[4] = 0.959772
b_mnk := F[5] = 3.7398
r := corr(x, y) = 0.926707
Оценки - среднего - и - дисперсии
My_est := 1/N*sum(y[j], j = 1 .. N) = 23.6647
Dy_est := 1/(N - 2)*sum((y[j] - (a_mnk + b_mnk*x[j]))^2, j = 1 .. N) = 27.0496
СКО
S_est := sqrt(Dy_est) = 5.20092
F_cs := sum((a_mnk + b_mnk*x[j] - My_est)^2, j = 1 .. N) = 16121
F - отношение
F_zn := 1/(N - 2)*sum((y[j] - (a_mnk + b_mnk*x[j]))^2, j = 1 .. N) = 27.0496
Fich := F_cs/F_zn = 595.982
fcr := qF(0.95, 2, 100)
fcr = 3.0873
