ORIGIN := 1
N := 100
b0 := 2
b1 := 2
Se := 3
Xmin := 0
Xmax := 12
x := runif(N, Xmin, Xmax)
e := rnorm(N, 0, Se)
y := b0 + b1*x + e
i := 1 .. N
XY := augment(x, y)
Корреляция
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r := corr(x, y) = 0.895807
D := [1, r; r, 1]
m := 1 .. 2
B[:, m] := runif(2, -1, 1)
Given
B*transpose(B) == D
B := Find(B)
B = [0.983919, -0.178613; 0.802018, -0.5973]
z[:, m] := rnorm(N, 0, 1)
xy := z*transpose(B)
r1 := corr(xy[:, 1], xy[:, 2])
r1 = 0.876879
Given
F := regress(xy[:, 1], xy[:, 2], 1)
a_mnk := F[4] = 0.0298822
b_mnk := F[5] = 0.838705
Dy_est := 1/(N - 2)*sum((xy[j, 2] - (a_mnk + b_mnk*x[j, 1]))^2, j = 1 .. N) = 39.1002
S_est := sqrt(Dy_est) = 6.25302
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