ORIGIN := 1
N := 1000
b0 := 4
b1 := 5
Se := 3
x := rnorm(N, 0, 1)
e := rnorm(N, 0, Se)
y := b0 + b1*x + e
i := 1 .. N
XY := augment(x, y)
Корреляция
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r := corr(x, y) = 0.863835
D := [1, r; r, 1]
m := 1 .. 2
B[:, m] := runif(2, -1, 1)
Given
B*transpose(B) == D
B := Find(B)
B = [0.987083, -0.160212; 0.771967, -0.635663]
z[:, m] := rnorm(N, 0, 1)
xy := z*transpose(B)
r1 := corr(xy[:, 1], xy[:, 2])
r1 = 0.853036
Given
F := regress(xy[:, 1], xy[:, 2], 1)
a_mnk := F[4] = 0.0289448
b_mnk := F[5] = 0.859471
Dy_est := 1/(N - 2)*sum((xy[j, 2] - (a_mnk + b_mnk*x[j, 1]))^2, j = 1 .. N) = 1.74704
S_est := sqrt(Dy_est) = 1.32176
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