ORIGIN := 1
N := 100
Se := 5
x := [
    7.866643337, 7.61269004, 0.893157693, 1.471083399, 2.711864889, 8.419878008, 2.261168634, 0.393279853, 7.4047862, 2.206732686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]
y := [
    -7.221743405, -13.40047317, -4.01976906, -4.204832484, -17.71867145, -16.65314488, 0.871605699, -3.548034024, -10.26620272, -8.053029459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]
Xmin := min(x) = 0.125532
Xmax := max(x) = 9.99652
n := 50
b1 := sum((transpose(x)[i] - mean(x))*(transpose(y)[i] - mean(y)), i = 1 .. n)/sum((transpose(x)[i] - mean(x))^2, i = 1 .. n) = -1.66148
b0 := mean(y) - b1*mean(x) = -2.83459
x := runif(N, Xmin, Xmax)
e := rnorm(N, 0, Se)
y := b0 + b1*x + e
i := 1 .. N
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