ORIGIN := 1
N := 50
n := 5
i := 1 .. N
j := 1 .. n
Se := 5
xy := [
    5.919081051, 7.253395377, 5.448621331, 0.977601058, 1.126839629, 2.817619702, 3.230334493, 8.401860845, 5.260689355, 5.917896233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;
    6.241589187, 7.107182472, 6.971972457, 6.75417447, 1.229139613, 9.791289241, 6.512871113, 7.039553878, 6.235540825, 3.906731734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;
    1.806420976, 5.620351191, 8.309203356, 8.6009244, 5.143992383, 4.41249443, 5.059664979, 1.624244032, 8.585279178, 2.235708538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;
    9.365124883, 1.806365048, 6.550656139, 7.496741504, 8.601571429, 9.319112495, 6.763707372, 3.885502528, 8.154511153, 4.811714579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;
    9.68569129, 3.831538405, 6.289634172, 2.122725907, 3.228239444, 0.232535827, 2.902503551, 4.035242873, 3.457150732, 2.695386163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;
    15.002809, 21.12168037, 16.47729897, 4.449270539, 10.94835622, 16.09699696, -2.448516731, 7.304811356, 18.50887576, 13.77251953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]
y := transpose(xy)[:, 6]
F[i, 1] := 1
F[i, j + 1] := transpose(xy)[i, j]
b := (transpose(F)*F)^-1*transpose(F)*y
b = [9.58132; 0.963408; -0.208013; 0.397292; -0.956079; 0.523066]
F = [
    1, 5.91908, 6.24159, 1.80642, 9.36512, 9.68569;
    1, 7.2534, 7.10718, 5.62035, 1.80637, 3.83154;
    1, 5.44862, 6.97197, 8.3092, 6.55066, 6.28963;
    1, 0.977601, 6.75417, 8.60092, 7.49674, 2.12273;
    1, 1.12684, 1.22914, 5.14399, 8.60157, 3.22824;
    1, 2.81762, 9.79129, 4.41249, 9.31911, 0.232536;
    1, 3.23033, 6.51287, 5.05966, 6.76371, 2.9025;
    1, 8.40186, 7.03955, 1.62424, 3.8855, 4.03524;
    1, 5.26069, 6.23554, 8.58528, 8.15451, 3.45715;
    1, 5.9179, 3.90673, 2.23571, 4.81171, 2.69539
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]
x := submatrix(xy, 1, 5, 1, N)
Xmin := min(x) = 0.0735781
Xmax := max(x) = 9.94265
F[:, j] := runif(N, Xmin, Xmax)
er := rnorm(N, 0, Se)
Y := F*b + er
