ORIGIN := 1
N := 100
b0 := 1
b1 := 10^-6
Se := 10^-6
Xmin := 0
Xmax := 12
x := runif(N, Xmin, Xmax)
e := rnorm(N, 0, Se)
y := b0 + b1*x + e
F := regress(x, y, 1)
a_mnk := F[4] = 1
b_mnk := F[5] = 1.00302e-6
r := corr(x, y) = 0.952947
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Dmin := 10^-3
Dmax := 10^3
ND := 20
bmin := 10^-3
bmax := 10^3
Nb := 20
M :=
    k ← 1
    for dw ∈ Dmin, Dmin + (Dmax - Dmin)/ND .. Dmax
        for bw ∈ bmin, bmin + (bmax - bmin)/Nb .. bmax
            x ← runif(N, 0, 10)
            y ← bw*x + rnorm(N, 0, dw)
            r ← corr(x, y)
            MR[k, 1] ← dw
            MR[k, 2] ← bw
            MR[k, 3] ← r
            k ← k + 1
    MR
# Сделать scatter plot в статистике
# и контурный график
M =  # no stored result
