ORIGIN := 1
i := 1 .. 2
N := 100
sig_f := 9
sig_e := 1
# В сумме 10
# Посмотреть и построить график таблицу:
# дисперсия (1,3,5,7,9)|общая информативность|главный компнент|total variants
F[:, i] := rnorm(N, 0, sig_f)
j := 1 .. 6
# По 2 фактором восстанавливаем модель множественной регрессиии остальные факторы
# Так же ошибки в маткаде
a[:, j] := runif(2, -3, 3)
a = [
    2.07624, -1.13889, -1.77025, -2.07716, 1.74542, -2.74555;
    -0.426583, 0.181804, -0.605582, -1.74671, -1.14067, -2.95937
]  # Построить отношение ошибок(?) от  каждого варианта при варьировании
e[:, j] := runif(N, 0, sig_e)
# Можно ещё дисперсию и их отношения(?)
a1 := [-0.124, 2.305, -2.611, -0.466, -2.84, 0.207; -1.214, 0.638, 0.454, -0.913, 0.978, -0.79]
a3 := [2.076, -1.139, -1.77, -2.077, 1.745, -2.746; -0.427, 0.182, -0.606, -1.747, -1.141, -2.959]
a5 := [1.857, -0.049, -1.329, 2.721, -1.492, 1.945; -2.171, -4.691*10^-4, -1.757, -2.697, -1.767, -1.916]
a7 := [-1.913, -0.767, 1.362, 1.624, -2.873, -1.111; -0.241, 2.854, -0.439, 0.896, -1.548, 1.493]
a9 := [0.792, -2.96, -1.088, -0.376, 2.761, -0.922; -0.748, -1.291, 2.034, 1.9, 2.255, -2.924]
x := F*a9 + e
x = [
    -1.07879, 25.0263, -1.63699, -6.01445, -26.7736, 19.28;
    7.32642, -32.5501, -7.61373, -0.78927, 33.1119, -13.8249;
    3.26949, -11.8797, -2.40615, 0.253506, 12.772, -5.68093;
    5.07346, 7.76659, -11.106, -10.3894, -12.3833, 16.8051;
    -12.5132, -6.47948, 33.0249, 28.4966, 22.1968, -37.0374;
    1.8634, 37.3954, -10.801, -15.2377, -44.6229, 37.688;
    0.649536, 30.6531, -7.80849, -11.8997, -36.081, 29.7193;
    -20.5882, 54.6327, 36.0797, 20.6186, -43.8641, 1.82768;
    -9.87783, 24.9757, 19.0525, 11.4013, -18.328, -1.67992;
    -10.0532, -27.0391, 32.0659, 31.3856, 43.6693, -49.3335
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]
xx := [
    4.16, -53.288, 5.238, 13.707, 60.882, -40.99, -1.25191123, 1.44563714;
    11.113, 15.759, -27.843, -25.992, -28.142, 39.989, 1.60055419, 0.271104966;
    15.406, 23.578, -38.974, -36.424, -40.805, 56.052, 2.25657526, 0.370846853;
    6.629, 33.864, -22.728, -24.077, -44.896, 46.116, 1.67885969, -0.443661965;
    -10.96, -1.175, 27.945, 23.825, 14.376, -28.197, -1.29597332, -0.805247991;
    -14.468, 15.744, 31.552, 23.483, -2.854, -20.905, -1.13679197, -1.43609835;
    -2.348, -7.737, 9.131, 9.664, 13.222, -13.61, -0.564857054, -0.074452857;
    0.306, 16.939, -3.075, -5.899, -19.238, 16.058, 0.495381747, -0.481707553;
    7.194, -35.476, -5.559, 2.062, 37.283, -18.371, -0.422191135, 1.22110369;
    4.729, 13.744, -12.3, -11.639, -18.824, 21.828, 0.819121143, -0.108512923
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]  # таблица из статисттки
XFt := □  # error: Пустой местозаполнитель.  # Вставить из excel (там надо заранее транспонировать)  # или
XF := transpose(XFt)  # error: Эта переменная не определена.
XF := xx
# Восстановление матрицы(?)
n := 1 .. 100
F := submatrix(XF, 1, 100, 6, 8)
F[n, 1] := 1
Y := submatrix(XF, 1, 100, 1, 6)
# Оценка параметров регрессии
b := (transpose(F)*F)^-1*transpose(F)*Y
Yp := F*b
Ep := Yp - Y
Ep
k := 1 .. 6
dy[k] := var(Y[:, k])
# Далее график общей дисперсии от ошибки(?)
dy = [72.3682; 748.88; 336.526; 251.7; 949.82; 694.75]
Yep1 =  # error: Эта переменная не определена.
Yep2 =  # error
