ORIGIN := 1
nK := 6
nT := 25
m := 1 .. 3
sige := 1
M := 0
Matrix(nK) :=
    for i ∈ 1 .. 3
        for j ∈ 1 .. nK
            matr[i, j] ← rnd(100)
    matr
X := Matrix(nK)
X = [
    69.5314, 64.4825, 75.11, 8.86751, 54.3594, 28.4078;
    81.531, 85.6474, 67.7079, 13.5278, 9.01557, 74.6601;
    45.2806, 13.7988, 57.0623, 56.5632, 79.3815, 57.6118
]
MatrixKlast(nk, nt, Mx) :=
    for k ∈ 1 .. nk
        for i ∈ 1 .. 3
            for j ∈ 1 .. nt
                klast[i, j + (k - 1)*nt] ← Mx[i, k]
    klast
Y := MatrixKlast(nK, nT, X)
Y = [
    69.5314, 69.5314, 69.5314, 69.5314, 69.5314, 69.5314, 69.5314, 69.5314, 69.5314, 69.5314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;
    81.531, 81.531, 81.531, 81.531, 81.531, 81.531, 81.531, 81.531, 81.531, 81.531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;
    45.2806, 45.2806, 45.2806, 45.2806, 45.2806, 45.2806, 45.2806, 45.2806, 45.2806, 45.2806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]
e[:, m] := rnorm(nK*nT, M, sige)
Tab := transpose(Y) + e
Tab = [
    70.5689, 82.2571, 44.9593;
    69.6532, 81.7161, 46.0236;
    68.9588, 81.1324, 44.0572;
    70.7433, 81.2834, 46.7447;
    68.8072, 79.9791, 44.6483;
    67.7582, 81.9437, 45.4861;
    70.0522, 79.911, 46.7696;
    71.4515, 82.4537, 43.8372;
    71.23, 82.4927, 45.3632;
    68.083, 80.2355, 45.3144
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]
e = [
    1.03744, 0.726097, -0.321271;
    0.121729, 0.185129, 0.742975;
    -0.57268, -0.398561, -1.22337;
    1.21188, -0.247654, 1.46409;
    -0.724201, -1.55189, -0.632306;
    -1.77326, 0.412656, 0.205548;
    0.520782, -1.62003, 1.48904;
    1.92006, 0.92273, -1.4434;
    1.69857, 0.961728, 0.0826037;
    -1.44845, -1.29547, 0.0337692
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]
