ORIGIN := 1
i := 1 .. 2
j := 1 .. 6
N := 150
sig_F := 1
sig_e := 1
F[:, i] := rnorm(N, 0, sig_F)
a := [2, 5, 3, 4, 8, 2; 1, 8, 3, 7, 5, 1]
e[:, j] := rnorm(N, 0, sig_e)
X := F*a + e
X = [
    1.35811, 0.429455, 0.182598, -0.387791, 4.45766, -0.0964266;
    -2.83598, -12.0895, -6.48262, -10.2665, -11.7388, -1.55002;
    -2.48894, -12.3044, -8.65867, -12.6623, -20.7472, -4.5325;
    -3.14505, -3.7587, -3.89628, -4.59584, -10.7935, -2.44267;
    1.04603, 6.70194, 1.29365, 4.51365, 4.23763, 0.239077;
    -5.74159, -12.0136, -5.8562, -11.9131, -17.7342, -4.63343;
    1.81365, -7.69666, -0.458401, -7.40363, 6.19127, 3.16696;
    -3.48388, -15.3368, -6.68058, -13.7575, -17.4814, -3.22827;
    0.410637, 8.42805, 4.5038, 4.62126, 7.15965, 2.73117;
    -2.96797, -5.11294, -3.77374, -5.69807, -5.79615, -0.509099
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]
