ORIGIN := 1
SKO := 3
O := [1, 2, 3, 4; 0, 10, 0, 0; 0, 0, 10, 0; 0, 0, 0, 10; 20, 30, 40, 50]
r := rows(O)
Ncl := cols(O)
i := 1 .. Ncl
Nobj[1] := 0
Nobj[i + 1] := Nobj[i] + O[r, i]
transpose(Nobj) = [0, 20, 50, 90, 140]
Cen :=
    n ← 1
    for cl ∈ 1 .. Ncl
        for nk ∈ Nobj[cl] + 1 .. Nobj[cl + 1]
            C[:, n] ← O[:, cl]
            n ← n + 1
    C
CenC := submatrix(transpose(Cen), 1, Nobj[Ncl + 1], 1, r - 1)
j := 2 .. r - 1
E[:, j] := rnorm(Nobj[Ncl + 1], 0, SKO)
ObjC := CenC + E
ObjC = [
    1, -0.704107, -6.31609, 4.26689;
    1, 0.537399, -2.55712, -1.22639;
    1, 1.3245, -2.33827, 1.64821;
    1, 2.05493, 3.5973, -2.77382;
    1, -3.57, 0.907481, 4.63393;
    1, 0.422591, 4.44152, 4.7193;
    1, -0.878655, 0.254188, -1.2998;
    1, -1.19949, -1.00212, 4.13831;
    1, 0.0943309, -5.53832, -2.21059;
    1, 1.17015, 1.17515, 1.53022
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]
