ORIGIN := 1
n := 2
m := 6
DF := 1
De := 2
N := 100
i := 1 .. 2
j := 1 .. m
e[:, j] := rnorm(N, 0, De)
F[:, i] := rnorm(N, 0, DF)
A := [2, -3, -4, 2, -1, 3; -3, 2, 4, 2, -2, -1]
F = [
    -1.79538, -1.50911;
    -0.752059, -0.959474;
    -0.739743, 0.662493;
    -0.489125, 0.80045;
    0.80918, 1.29378;
    -0.821493, -0.344319;
    -0.356743, -0.143471;
    0.978435, -3.28726;
    -0.931976, -0.883189;
    -1.74282, 0.780793
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]
Y := F*A + e
Y = [
    4.12378, 3.52302, -0.0808962, -5.2418, 5.91571, -6.03978;
    5.55113, -0.870393, -1.8892, -4.78574, 2.25149, 0.791011;
    -1.82372, 3.28349, 6.81038, -0.00296478, -3.12303, -2.17428;
    -4.27705, -0.0849978, 6.51022, -0.33314, -0.729681, -2.57244;
    -1.8705, 3.25172, 0.405076, 3.73381, -5.21479, 3.73467;
    -0.893209, 3.36421, 3.38518, -0.107692, -0.372446, -0.045419;
    -1.67328, -2.234, 0.326583, 0.355295, 0.569599, 2.36251;
    14.3443, -12.01, -15.9443, -4.79733, 8.23665, 4.80467;
    -0.859254, 5.49559, 3.62693, -6.27307, 3.8169, -1.78706;
    -5.26219, 7.76363, 10.0609, 0.842638, 2.11368, -2.38984
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]
