ORIGIN := 1
O := [0, 5, 0, 0; 0, 0, 5, 0; 0, 0, 0, 5]
sige := 0.5
i := 1 .. 20
klast[:, i] := O[:, 1]
i := 21 .. 40
klast[:, i] := O[:, 2]
i := 41 .. 60
klast[:, i] := O[:, 3]
i := 61 .. 80
klast[:, i] := O[:, 4]
j := 1 .. 3
e[:, j] := rnorm(80, 0, sige)
TabObj := transpose(klast) + e
TabObj = [
    -0.219485, 0.269568, 0.405524;
    -0.339703, 0.109317, 0.308476;
    -0.236643, 0.20252, -0.122556;
    -0.475733, -0.577975, -0.0428795;
    -0.842842, -0.552565, 0.342403;
    0.0217651, -0.551683, 0.39557;
    -0.0603174, -0.203639, 0.178886;
    0.278213, -0.656646, -0.105668;
    1.09589, -1.4202, -0.0777539;
    0.404367, 0.638082, 0.0679809
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]
