ORIGIN := 1
SKO := 3
O := [1, 2, 3, 4; 5, -10, 10, -10; 8, 10, -10, -13; 20, 20, 30, 30]
r := rows(O)
r = 4
Ncl := cols(O)
Ncl = 4
i := 1 .. Ncl
Nobj[1] := 0
Nobj[i + 1] := Nobj[i] + O[r, i]
transpose(Nobj) = [0, 20, 40, 70, 100]
Cen :=
    n ← 1
    for cl ∈ 1 .. Ncl
        for nk ∈ Nobj[cl] + 1 .. Nobj[cl + 1]
            C[:, n] ← O[:, cl]
            n ← n + 1
    C
CenC := submatrix(transpose(Cen), 1, Nobj[Ncl + 1], 1, r - 1)
j := 2 .. r - 1
E[:, j] := rnorm(Nobj[Ncl + 1], 0, SKO)
ObjC := CenC + E
O := [1, 2, 3, 4; 10, 0, 0, 0; 0, 10, 0, 0; 0, 0, 10, 0; 0, 0, 0, 10; 20, 20, 20, 20]
ObjC = [
    1, 3.68309, 9.31322;
    1, 2.96178, 13.281;
    1, 3.58014, 6.05822;
    1, 2.1456, 9.65313;
    1, -0.0570543, 12.6394;
    1, 5.13059, 2.53507;
    1, 4.6381, 11.9238;
    1, 6.66928, 4.8532;
    1, 11.5754, 9.37744;
    1, 7.4262, 4.84328
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]
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ObjC1 := submatrix(ObjC, 1, 100, 2, 3)
O := [1, 2, 3, 4; 0, 10, 0, 0; 0, 0, 10, 0; 0, 0, 0, 10; 20, 20, 30, 30]
ObjC1 = [
    3.68309, 9.31322;
    2.96178, 13.281;
    3.58014, 6.05822;
    2.1456, 9.65313;
    -0.0570543, 12.6394;
    5.13059, 2.53507;
    4.6381, 11.9238;
    6.66928, 4.8532;
    11.5754, 9.37744;
    7.4262, 4.84328
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]
