ORIGIN := 1
SKO := 3
O := [1, 2, 3, 4; 0, 10, 0, 0; 0, 0, 10, 0; 0, 0, 0, 10; 20, 20, 30, 30]
r := rows(O)
r = 5
Ncl := cols(O)
Ncl = 4
i := 1 .. Ncl
Nobj[1] := 0
Nobj[i + 1] := Nobj[i] + O[r, i]
transpose(Nobj) = [0, 20, 40, 70, 100]
Cen :=
    n ← 1
    for cl ∈ 1 .. Ncl
        for nk ∈ Nobj[cl] + 1 .. Nobj[cl + 1]
            C[:, n] ← O[:, cl]
            n ← n + 1
    C
CenC := submatrix(transpose(Cen), 1, Nobj[Ncl + 1], 1, r - 1)
j := 2 .. r - 1
E[:, j] := rnorm(Nobj[Ncl + 1], 0, SKO)
ObjC := CenC + E
O := [1, 2, 3, 4; 5, -10, 10, -10; 8, 10, -10, -13; 20, 20, 30, 30]
ObjC = [
    1, 0.127006, 0.326694, 3.65189;
    1, 2.71755, 0.805364, 1.86982;
    1, -2.37482, -4.49317, 1.37132;
    1, 3.82683, 0.348361, 1.8226;
    1, 4.27465, 0.811443, -9.73798;
    1, 1.51035, -3.98043, -2.56267;
    1, -1.55659, -1.40755, 1.16049;
    1, -1.60196, 5.49301, 4.36514;
    1, 1.88615, 0.993801, -4.96125;
    1, -4.07991, 2.51042, 0.572789
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]
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O := [1, 2, 3, 4; 10, 0, 0, 0; 0, 10, 0, 0; 0, 0, 10, 0; 0, 0, 0, 10; 20, 20, 20, 20]
ObjC1 := submatrix(ObjC, 1, 80, 2, 4)
ObjC1 = [
    0.127006, 0.326694, 3.65189;
    2.71755, 0.805364, 1.86982;
    -2.37482, -4.49317, 1.37132;
    3.82683, 0.348361, 1.8226;
    4.27465, 0.811443, -9.73798;
    1.51035, -3.98043, -2.56267;
    -1.55659, -1.40755, 1.16049;
    -1.60196, 5.49301, 4.36514;
    1.88615, 0.993801, -4.96125;
    -4.07991, 2.51042, 0.572789
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]
