ORIGIN := 1
i := 1 .. 2
N := 100
sig_F := 1
sig_e := 10
F[:, i] := rnorm(N, 0, sig_F)
j := 1 .. 6
a := [2, 5, 3, 4, 8, 2; 1, 8, 3, 7, 2, 1]
e[:, j] := rnorm(N, 0, sig_e)
X := F*a + e
X = [
    -6.71104, 1.90457, -20.5189, 6.6914, -2.89578, -9.28548;
    -5.13225, 5.70502, -8.00425, 8.3252, 15.683, 1.98788;
    -5.05399, -6.98212, 1.89795, -13.6344, -20.1524, -19.6316;
    -5.99683, -8.54888, 3.01485, 9.87994, 9.98931, -13.0174;
    0.684567, 3.4708, -6.33237, -1.15722, -8.265, 3.76086;
    -5.46816, -16.8705, -12.1897, 4.91697, -13.3473, -16.7065;
    -1.66481, 10.0524, 5.06526, -8.27769, -1.64723, 3.37643;
    12.9592, 12.2491, -26.9664, 10.1567, -3.10385, -5.15537;
    6.78355, 13.9094, 10.2117, 35.893, 13.1847, -29.4024;
    21.4297, -9.06773, -9.68088, -6.48043, -9.57931, -18.443
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]
