ORIGIN := 1
n := 2
m := 6
sig_F := 1
N := 100
i := 1 .. n
j := 1 .. m
sig_e := 1
F[:, i] := rnorm(N, 0, sig_F)
A[:, j] := ceil(runif(n, -10, 10))
A = [-3, 1, 3, -1, -6, 9; 2, -8, 0, -9, -8, 1]
e[:, j] := rnorm(N, 0, sig_e)
X := F*A + e
X = [
    -1.45439, 8.50811, 0.141215, 6.08906, 6.70469, 0.1597;
    0.68392, -8.95085, -0.557907, -10.3738, -9.36952, 5.67851;
    -4.52139, 0.504354, 5.21448, -1.9227, -7.61619, 10.562;
    -1.90362, 4.02654, -2.38285, 4.60494, 5.49311, -0.96547;
    -3.22932, -3.51506, 3.27319, -7.06641, -13.8775, 13.5317;
    2.17126, -13.0892, 1.02663, -15.0146, -12.848, 2.64814;
    -0.808426, -1.06133, 2.37497, 1.19477, -1.15932, 3.6658;
    -1.30258, -5.56961, 3.46212, -7.53874, -16.4358, 13.1154;
    -2.63134, 9.59819, 1.3792, 8.99297, 5.9335, 4.33934;
    0.680022, -4.61134, 0.514352, -10.2668, -10.2877, 4.52206
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]
