ORIGIN := 1
N := 36
k := 1 .. 4
Se := 1
a := 10
b := 1.5
c := 1.5
i := 1 .. N/4
PL[i, 1] := -1
i := N/4 + 1 .. N*3/4
PL[i, 1] := 0
i := N*3/4 + 1 .. N
PL[i, 1] := 1
i := 1 .. N/3
PL[i, 2] := -1
i := N/3 + 1 .. N*2/3
PL[i, 2] := 0
i := N*2/3 + 1 .. N
PL[i, 2] := 1
i := 1 .. N
PL[i, 3] := -1 + (i - 1)/(N - 1)*2
i := 1 .. N/4
PL[i, 4] := 0.3
i := N/4 + 1 .. N*3/4
PL[i, 4] := 0.4
i := N*3/4 + 1 .. N
PL[i, 4] := 0.3
PL[:, k + 4] := a + b*PL[:, k] + c*PL[:, k]^2 + rnorm(N, 0, Se)
M := 1000
TT :=
    for m ∈ 1 .. M
        for pl ∈ 1 .. 4
            yy ← a + b*PL[:, pl] + c*PL[:, pl]^2 + rnorm(N, 0, Se)
            prm ← regress(PL[:, pl], yy, 3)
            Rez[m, 1 + (pl - 1)*4] ← prm[4]
            Rez[m, 2 + (pl - 1)*4] ← prm[5]
            Rez[m, 3 + (pl - 1)*4] ← prm[6]
            Rez[m, 4 + (pl - 1)*4] ← prm[7]
    Rez
PL = [
    -1, -1, -1, 0.3, 9.56103, 10.7708, 9.67973, 11.0441;
    -1, -1, -0.942857, 0.3, 9.32059, 10.3059, 7.88797, 9.53276;
    -1, -1, -0.885714, 0.3, 9.52671, 10.0113, 8.43697, 9.34285;
    -1, -1, -0.828571, 0.3, 9.04853, 9.23553, 8.46163, 11.0091;
    -1, -1, -0.771429, 0.3, 8.31432, 9.59086, 9.21846, 8.66842;
    -1, -1, -0.714286, 0.3, 10.0435, 9.32616, 9.75595, 10.4611;
    -1, -1, -0.657143, 0.3, 9.87937, 9.86784, 9.06628, 10.9982;
    -1, -1, -0.6, 0.3, 10.5564, 11.0181, 9.30933, 12.0506;
    -1, -1, -0.542857, 0.3, 12.1918, 10.1805, 10.1669, 9.35608;
    0, -1, -0.485714, 0.4, 10.8087, 10.5133, 9.84394, 10.4554
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]
D[k] := var(TT[:, k])
# Это для первого плана
D = [0.0537205; 0.00207661; 0.107757; 0.0332258]
TT = [
    10.598, 0.259319, 1.26649, 1.03727, 9.85896, 0.452558, 1.64155, 1.01826, 10.3376, 1.19246, 0.586154, -0.147934, 18.5758, -67.3883, 191.237, -182.131;
    9.91217, 0.312455, 1.40714, 1.24982, 10.1781, 0.52178, 1.28264, 1.174, 9.99136, 1.03817, 1.74334, 1.45051, 20.4848, -83.3911, 236.65, -225.381;
    9.82102, 0.328932, 2.11921, 1.31573, 9.98581, 0.421789, 1.46898, 0.949026, 10.0222, -0.0932792, 1.55771, 1.92087, -54.2379, 548.246, -1555.83, 1481.75;
    10.0708, 0.289275, 1.48959, 1.1571, 9.71398, 0.44386, 1.52195, 0.998686, 9.78286, 1.50281, 1.33147, 0.00636958, -13.1919, 201.71, -572.419, 545.161;
    10.4477, 0.235317, 1.1016, 0.941267, 10.121, 0.510074, 1.38419, 1.14767, 9.94099, 1.57331, 1.36712, 0.272862, 0.227263, 90.4848, -256.781, 244.554;
    9.90163, 0.322209, 1.50706, 1.28883, 10.5147, 0.429262, 0.667852, 0.96584, 10.2606, 1.29408, 0.82617, 0.337512, -50.0644, 516.65, -1466.17, 1396.35;
    10.0973, 0.340467, 1.60885, 1.36187, 9.78364, 0.43915, 1.75696, 0.988087, 9.87032, 2.59304, 1.1371, -1.1474, -7.76376, 155.743, -441.973, 420.926;
    10.0453, 0.261811, 1.70656, 1.04724, 9.83788, 0.453226, 1.7993, 1.01976, 10.0216, 2.581, 1.27502, -0.841698, -11.6813, 191.043, -542.149, 516.332;
    9.81065, 0.344856, 2.09132, 1.37942, 9.85248, 0.41384, 2.07896, 0.93114, 10.2479, 1.438, 0.911302, -0.347202, -24.4144, 299.517, -849.98, 809.504;
    9.66066, 0.265219, 1.8941, 1.06088, 10.2396, 0.339405, 1.29528, 0.763661, 9.73836, 0.736848, 1.90631, 0.290944, 4.13055, 55.5214, -157.561, 150.058
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]
